// SBML level 2 version 4

function f1_transcripcio(amintr, adeltatr, KM, n, Prep, Vcel)
  amintr + adeltatr*KM^n/(KM^n + (Prep*Vcel)^n);
end
f1_transcripcio is "f1-transcripcio";

function f2_traduccion(k, mRNA)
  k*mRNA;
end
f2_traduccion is "f2-traduccion";

function Constant_flux__irreversible(v)
  v;
end
Constant_flux__irreversible is "Constant flux (irreversible)";

model New_Model()
  // Repressilator MiSB

  // Compartments:
  compartment compartment = 1;

  // Species:
  species cI_mRNA in compartment = 0; cI_mRNA is "cI-mRNA";
  species cI_proteina in compartment = 0; cI_proteina is "cI-proteina";
  species TetR_mRNA in compartment = 20; TetR_mRNA is "TetR-mRNA";
  species TetR_proteina in compartment = 0; TetR_proteina is "TetR-proteina";
  species LacI_mRNA in compartment = 0; LacI_mRNA is "LacI-mRNA";
  species LacI_proteina in compartment = 0; LacI_proteina is "LacI-proteina";

  // Parameters:
  Tps_r = 0.0005;
  Tps_a = 0.5;
  Pr_hl = 10;
  mRNA_hl = 2;
  Tr_eff = 20;
  KM = 40;
  n = 2;

  // Assignment rules:
  A0 := Tps_r*60;
  Alfa_min_tr := A0*Tr_eff*Pr_hl/(ln(2)*KM);
  Adelta := (Tps_a - Tps_r)*60;
  kd_pr := ln(2)/Pr_hl;
  Alfa_delta_tr := Adelta*Tr_eff*Pr_hl/(ln(2)*KM);
  kd_mRNA := ln(2)/mRNA_hl;
  beta := mRNA_hl/Pr_hl;
  mRNA_tv := mRNA_hl/ln(2);
  k_tl := Tr_eff/mRNA_tv;

  // Reactions:
  make_cl_p: => cI_proteina; compartment*f2_traduccion(k_tl, cI_mRNA); make_cl_p is "make-cl-p";  // modifiers: cI_mRNA
  rm_cl_m: cI_mRNA => ; compartment*kd_mRNA*cI_mRNA; rm_cl_m is "rm-cl-m";
  rm_cl_p: cI_proteina => ; compartment*kd_pr*cI_proteina; rm_cl_p is "rm-cl-p";
  make_TetR_m: => TetR_mRNA; compartment*f1_transcripcio(Alfa_min_tr, Alfa_delta_tr, KM, n, LacI_proteina, compartment); make_TetR_m is "make-TetR-m";  // modifiers: LacI_proteina
  make_TetR_p: => TetR_proteina; compartment*f2_traduccion(k_tl, TetR_mRNA); make_TetR_p is "make-TetR-p";  // modifiers: TetR_mRNA
  rm_TetR_m: TetR_mRNA => ; compartment*kd_mRNA*TetR_mRNA; rm_TetR_m is "rm-TetR-m";
  rm_TetR_p: TetR_proteina => ; compartment*kd_pr*TetR_proteina; rm_TetR_p is "rm-TetR-p";
  make_LacI_m: => LacI_mRNA; compartment*f1_transcripcio(Alfa_min_tr, Alfa_delta_tr, KM, n, cI_proteina, compartment); make_LacI_m is "make-LacI-m";  // modifiers: cI_proteina
  make_LacI_p: => LacI_proteina; compartment*f2_traduccion(k_tl, LacI_mRNA); make_LacI_p is "make-LacI-p";  // modifiers: LacI_mRNA
  rm_LacI_m: LacI_mRNA => ; compartment*kd_mRNA*LacI_mRNA; rm_LacI_m is "rm-LacI-m";
  rm_LacI_p: LacI_proteina => ; compartment*kd_pr*LacI_proteina; rm_LacI_p is "rm-LacI-p";
  make_cl_mRNA: => cI_mRNA; compartment*f1_transcripcio(Alfa_min_tr, Alfa_delta_tr, KM, n, TetR_proteina, compartment); make_cl_mRNA is "make-cl-mRNA";  // modifiers: TetR_proteina

  // Unit definitions:
  unit volume = 1e-15 litre;
  unit substance = item;
  unit time = 60 second;
end
