// SBML level 2 version 4

function Constant_flux__irreversible(v)
  v;
end
Constant_flux__irreversible is "Constant flux (irreversible)";

model New_Model()
  // Repressilator MiSB

  // Compartments:
  compartment compartment = 1;

  // Species:
  species cI_mRNA in compartment = 1; cI_mRNA is "cI-mRNA";
  species cI_proteina in compartment = 1; cI_proteina is "cI-proteina";
  species TetR_mRNA in compartment = 1; TetR_mRNA is "TetR-mRNA";
  species TetR_proteina in compartment = 1; TetR_proteina is "TetR-proteina";
  species LacI_mRNA in compartment = 1; LacI_mRNA is "LacI-mRNA";
  species LacI_proteina in compartment = 1; LacI_proteina is "LacI-proteina";

  // Reactions:
  make_cl_m: => cI_mRNA; compartment*Constant_flux__irreversible(make_cl_m_v); make_cl_m is "make-cl-m";
    make_cl_m_v = 0.1;
  make_cl_p: => cI_proteina; compartment*Constant_flux__irreversible(make_cl_p_v); make_cl_p is "make-cl-p";
    make_cl_p_v = 0.1;
  rm_cl_m: cI_mRNA => ; compartment*rm_cl_m_k1*cI_mRNA; rm_cl_m is "rm-cl-m";
    rm_cl_m_k1 = 0.1;
  rm_cl_p: cI_proteina => ; compartment*rm_cl_p_k1*cI_proteina; rm_cl_p is "rm-cl-p";
    rm_cl_p_k1 = 0.1;
  make_TetR_m: => TetR_mRNA; compartment*Constant_flux__irreversible(make_TetR_m_v); make_TetR_m is "make-TetR-m";
    make_TetR_m_v = 0.1;
  make_TetR_p: => TetR_proteina; compartment*Constant_flux__irreversible(make_TetR_p_v); make_TetR_p is "make-TetR-p";
    make_TetR_p_v = 0.1;
  rm_TetR_m: TetR_mRNA => ; compartment*rm_TetR_m_k1*TetR_mRNA; rm_TetR_m is "rm-TetR-m";
    rm_TetR_m_k1 = 0.1;
  rm_TetR_p: TetR_proteina => ; compartment*rm_TetR_p_k1*TetR_proteina; rm_TetR_p is "rm-TetR-p";
    rm_TetR_p_k1 = 0.1;
  make_LacI_m: LacI_mRNA => ; compartment*make_LacI_m_k1*LacI_mRNA; make_LacI_m is "make-LacI-m";
    make_LacI_m_k1 = 0.1;
  make_LacI_p: LacI_proteina => ; compartment*make_LacI_p_k1*LacI_proteina; make_LacI_p is "make-LacI-p";
    make_LacI_p_k1 = 0.1;
  rm_LacI_m: => LacI_mRNA; compartment*Constant_flux__irreversible(rm_LacI_m_v); rm_LacI_m is "rm-LacI-m";
    rm_LacI_m_v = 0.1;
  rm_LacI_p: => LacI_proteina; compartment*Constant_flux__irreversible(rm_LacI_p_v); rm_LacI_p is "rm-LacI-p";
    rm_LacI_p_v = 0.1;

  // Unit definitions:
  unit volume = 1e-3 litre;
  unit substance = 1e-3 mole;
end
